Run Start Date:  29/08/2019
Run Start Time: 15:21:10.37
Run Stop Date:   29/08/2019
Run Stop Time:  15:22:23.09

********************                            CONTROL STREAM                                      ********************

$PROB    INFUSION_1CPT_VCL MULTIPLE DOSE FOCE INTER (120 Ind/4677 Obs) runODE013
$INPUT   ID TIME DV LNDV MDV AMT RATE EVID DOSE VI CLI SSX IIX SD CMT
$DATA    INFUSION_1CPT.csv IGNORE=@ IGNORE (SD.EQ.1)
$SUBR    ADVAN13 TOL=6
$MODEL   COMP(CENTRAL,DEFOBS)
$PK
         CL=EXP(THETA(1)+ETA(1))
         V=EXP(THETA(2)+ETA(2))
         S1=V
$DES
         DADT(1)=-CL*(A(1)/V)
$ERROR
         IPRED = F
         RESCV = THETA(3)
         W     = IPRED*RESCV
         IRES  = DV-IPRED
         IWRES = IRES/W
         Y     = IPRED+W*EPS(1)
$THETA   1.6       ;log Cl
$THETA   4.5       ;log Vc
$THETA   (0,0.3,1) ;RSV
$OMEGA   0.15 0.15
$SIGMA   1 FIX
$EST     NSIG=2 SIGL=6 PRINT=5 MAX=9999 NOABORT POSTHOC METHOD=COND INTER NOOBT
$COV
$TABLE  ID TIME LNDV MDV AMT EVID DOSE VI CLI CL V ETA1 ETA2
        IPRED IRES IWRES CWRESI
        ONEHEADER NOPRINT FILE=runODE013.csv

********************                            SYSTEM INFORMATION                                  ********************

Operating system:

Microsoft Windows [Version 10.0.18362.295]

Compiler: Intel(R) Parallel Studio XE 2015 Update 3 Composer Edition (package 208)

Compiler settings: /Gs /nologo /nbs /w /fp:strict

********************                            NMTRAN MESSAGES                                     ********************

 WARNINGS AND ERRORS (IF ANY) FOR PROBLEM    1
 (WARNING  2) NM-TRAN INFERS THAT THE DATA ARE POPULATION.
********************                            NONMEM EXECUTION                                    ********************

1NONLINEAR MIXED EFFECTS MODEL PROGRAM (NONMEM) VERSION 7.4.3
 ORIGINALLY DEVELOPED BY STUART BEAL, LEWIS SHEINER, AND ALISON BOECKMANN
 CURRENT DEVELOPERS ARE ROBERT BAUER, ICON DEVELOPMENT SOLUTIONS,
 AND ALISON BOECKMANN. IMPLEMENTATION, EFFICIENCY, AND STANDARDIZATION
 PERFORMED BY NOUS INFOSYSTEMS.
 PROBLEM NO.:         1
 INFUSION_1CPT_VCL MULTIPLE DOSE FOCE INTER (120 Ind/4677 Obs) runODE013
 TOT. NO. OF OBS RECS:     4677
 TOT. NO. OF INDIVIDUALS:      120
 GENERAL NONLINEAR KINETICS MODEL WITH STIFF/NONSTIFF EQUATIONS (LSODA, ADVAN13)
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 #TBLN:      1
 #METH: First Order Conditional Estimation with Interaction
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
 #TERM:
0MINIMIZATION SUCCESSFUL
 HOWEVER, PROBLEMS OCCURRED WITH THE MINIMIZATION.
 REGARD THE RESULTS OF THE ESTIMATION STEP CAREFULLY, AND ACCEPT THEM ONLY
 AFTER CHECKING THAT THE COVARIANCE STEP PRODUCES REASONABLE OUTPUT.
 NO. OF FUNCTION EVALUATIONS USED:      212
 NO. OF SIG. DIGITS IN FINAL EST.:  2.6

 ETABAR IS THE ARITHMETIC MEAN OF THE ETA-ESTIMATES,
 AND THE P-VALUE IS GIVEN FOR THE NULL HYPOTHESIS THAT THE TRUE MEAN IS 0.

 ETABAR:         3.8924E-05 -1.3343E-03
 SE:             2.5589E-02  2.6609E-02
 N:                     120         120

 P VAL.:         9.9879E-01  9.6001E-01

 ETASHRINKSD(%)  2.3764E-01  1.3980E+00
 ETASHRINKVR(%)  4.7472E-01  2.7764E+00
 EBVSHRINKSD(%)  6.2634E-01  1.6255E+00
 EBVSHRINKVR(%)  1.2488E+00  3.2245E+00
 EPSSHRINKSD(%)  2.4176E+00
 EPSSHRINKVR(%)  4.7767E+00


 TOTAL DATA POINTS NORMALLY DISTRIBUTED (N):         4677
 N*LOG(2PI) CONSTANT TO OBJECTIVE FUNCTION:    8595.75103959651
 OBJECTIVE FUNCTION VALUE WITHOUT CONSTANT:    44216.3187060358
 OBJECTIVE FUNCTION VALUE WITH CONSTANT:       52812.0697456323
 REPORTED OBJECTIVE FUNCTION DOES NOT CONTAIN CONSTANT

 TOTAL EFFECTIVE ETAS (NIND*NETA):                           240


 #TERE:
 Elapsed estimation  time in seconds:    52.46
 Elapsed covariance  time in seconds:    10.88
 Elapsed postprocess time in seconds:     0.42

 ********************               FIRST ORDER CONDITIONAL ESTIMATION WITH INTERACTION              ********************
 #OBJT:**************                       MINIMUM VALUE OF OBJECTIVE FUNCTION                      ********************
 #OBJV:********************************************    44216.319       **************************************************

 ********************               FIRST ORDER CONDITIONAL ESTIMATION WITH INTERACTION              ********************
 ********************                             FINAL PARAMETER ESTIMATE                           ********************

 THETA - VECTOR OF FIXED EFFECTS PARAMETERS   *********
         TH 1      TH 2      TH 3
         1.39E+00  4.27E+00  2.00E-01

 OMEGA - COV MATRIX FOR RANDOM EFFECTS - ETAS  ********
         ETA1      ETA2
 ETA1
+        7.96E-02
 ETA2
+        0.00E+00  8.81E-02

 SIGMA - COV MATRIX FOR RANDOM EFFECTS - EPSILONS  ****
         EPS1
 EPS1
+        1.00E+00

 OMEGA - CORR MATRIX FOR RANDOM EFFECTS - ETAS  *******
         ETA1      ETA2
 ETA1
+        2.82E-01
 ETA2
+        0.00E+00  2.97E-01

 SIGMA - CORR MATRIX FOR RANDOM EFFECTS - EPSILONS  ***
         EPS1
 EPS1
+        1.00E+00

 ********************               FIRST ORDER CONDITIONAL ESTIMATION WITH INTERACTION              ********************
 ********************                            STANDARD ERROR OF ESTIMATE                          ********************

 THETA - VECTOR OF FIXED EFFECTS PARAMETERS   *********
         TH 1      TH 2      TH 3
         2.59E-02  2.76E-02  2.35E-03

 OMEGA - COV MATRIX FOR RANDOM EFFECTS - ETAS  ********
         ETA1      ETA2
 ETA1
+        9.61E-03
 ETA2
+       .........  1.14E-02

 SIGMA - COV MATRIX FOR RANDOM EFFECTS - EPSILONS  ****
         EPS1
 EPS1
+       .........

 OMEGA - CORR MATRIX FOR RANDOM EFFECTS - ETAS  *******
         ETA1      ETA2
 ETA1
+        1.70E-02
 ETA2
+       .........  1.93E-02

 SIGMA - CORR MATRIX FOR RANDOM EFFECTS - EPSILONS  ***
         EPS1
 EPS1
+       .........

 ********************               FIRST ORDER CONDITIONAL ESTIMATION WITH INTERACTION              ********************
 ********************                          COVARIANCE MATRIX OF ESTIMATE                         ********************

            TH 1      TH 2      TH 3      OM11      OM12      OM22      SG11
 TH 1
+        6.72E-04
 TH 2
+        6.35E-05  7.64E-04
 TH 3
+       -1.61E-06  2.17E-06  5.55E-06
 OM11
+       -4.57E-05  1.02E-05 -3.22E-06  9.23E-05
 OM12
+       ......... ......... ......... ......... .........
 OM22
+        3.19E-06  5.09E-05 -6.92E-07 -5.09E-06 .........  1.31E-04
 SG11
+       ......... ......... ......... ......... ......... ......... .........

 ********************               FIRST ORDER CONDITIONAL ESTIMATION WITH INTERACTION              ********************
 ********************                          CORRELATION MATRIX OF ESTIMATE                        ********************

            TH 1      TH 2      TH 3      OM11      OM12      OM22      SG11
 TH 1
+        2.59E-02
 TH 2
+        8.86E-02  2.76E-02
 TH 3
+       -2.64E-02  3.33E-02  2.35E-03
 OM11
+       -1.84E-01  3.84E-02 -1.42E-01  9.61E-03
 OM12
+       ......... ......... ......... ......... .........
 OM22
+        1.08E-02  1.61E-01 -2.57E-02 -4.63E-02 .........  1.14E-02
 SG11
+       ......... ......... ......... ......... ......... ......... .........
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 Elapsed finaloutput time in seconds:     0.31
 #CPUT: Total CPU Time in Seconds,       64.453
