$PROB    Oral1_1CPT_KAVCL MULTIPLE DOSE FOCEI (120 Ind/4674 Obs) runODE024
$INPUT   ID TIME DV LNDV MDV AMT EVID DOSE VI CLI KAI SSX IIX SD CMT
$DATA    Oral_1CPT.csv IGNORE=@ IGNORE (SD.EQ.1)
$SUBR    ADVAN13 TOL=6
$MODEL
         COMP=(ABS,DEFDOSE)
         COMP=(CENTRAL,DEFOBS)
$PK
         CL=EXP(THETA(1)+ETA(1))
         V =EXP(THETA(2)+ETA(2))
         KA=EXP(THETA(3)+ETA(3))
         S2=V
$DES
         DADT(1)= -KA*A(1)
         DADT(2)=  KA*A(1)-CL*(A(2)/V)
$ERROR
         IPRED = F
         RESCV = THETA(4)
         W     = IPRED*RESCV
         IRES  = DV-IPRED
         IWRES = IRES/W
         Y     = IPRED+W*EPS(1)
$THETA   1.6       ;log Cl
$THETA   4.5       ;log Vc
$THETA   0.2       ;log KA
$THETA   (0,0.3,1) ;RSV
$OMEGA   0.15 0.15 0.15
$SIGMA   1 FIX
$EST     NSIG=2 SIGL=6 PRINT=5 MAX=9999 NOABORT POSTHOC METHOD=COND INTER NOOBT
$COV
$TABLE  ID TIME LNDV MDV AMT EVID DOSE VI CLI CL V ETA1 ETA2 ETA3
        IPRED IRES IWRES CWRESI
        ONEHEADER NOPRINT FILE=runODE024.csv
