Run Start Date:  29/08/2019
Run Start Time: 15:51:57.51
Run Stop Date:   29/08/2019
Run Stop Time:  15:59:03.17

********************                            CONTROL STREAM                                      ********************

$PROB    ORAL1_1CPT_KAVVMKM SINGLE DOSE FOCEI (120 Ind/2279 Obs) runODE029
$INPUT   ID TIME DV LNDV MDV AMT EVID DOSE VI VMI KMI KAI SD CMT
$DATA    ORAL_1CPTMM.csv IGNORE=@ IGNORE (SD.EQ.0)
$SUBR    ADVAN13 TOL=6
$MODEL
         COMP=(ABS,DEFDOSE)
         COMP=(CENTRAL,DEFOBS)
$PK
         VM=EXP(THETA(1)+ETA(1))
         KM=EXP(THETA(2)+ETA(2))
         V =EXP(THETA(3)+ETA(3))
         KA=EXP(THETA(4)+ETA(4))
         S2=V
$DES
         DADT(1)= -KA*A(1)
         DADT(2)=  KA*A(1)-VM*(A(2)/V)/(KM+(A(2)/V))
$ERROR
         IPRED = F
         RESCV = THETA(5)
         W     = IPRED*RESCV
         IRES  = DV-IPRED
         IWRES = IRES/W
         Y     = IPRED+W*EPS(1)

$THETA   7         ;log VM
$THETA   5.7       ;log KM
$THETA   4.5       ;log Vc
$THETA   0.2       ;log KA
$THETA   (0,0.3,1) ;RSV
$OMEGA   0.15 0.15 0.15 0.15
$SIGMA   1 FIX
$EST     NSIG=2 SIGL=6 PRINT=5 MAX=9999 NOABORT POSTHOC METHOD=COND INTER NOOBT
$COV
$TABLE  ID TIME LNDV MDV AMT EVID DOSE VI VMI KMI V VM KM KA ETA1 ETA2 ETA3 ETA4
        IPRED IRES IWRES CWRESI
        ONEHEADER NOPRINT FILE=runODE029.csv

********************                            SYSTEM INFORMATION                                  ********************

Operating system:

Microsoft Windows [Version 10.0.18362.295]

Compiler: Intel(R) Parallel Studio XE 2015 Update 3 Composer Edition (package 208)

Compiler settings: /Gs /nologo /nbs /w /fp:strict

********************                            NMTRAN MESSAGES                                     ********************

 WARNINGS AND ERRORS (IF ANY) FOR PROBLEM    1
 (WARNING  2) NM-TRAN INFERS THAT THE DATA ARE POPULATION.
********************                            NONMEM EXECUTION                                    ********************

1NONLINEAR MIXED EFFECTS MODEL PROGRAM (NONMEM) VERSION 7.4.3
 ORIGINALLY DEVELOPED BY STUART BEAL, LEWIS SHEINER, AND ALISON BOECKMANN
 CURRENT DEVELOPERS ARE ROBERT BAUER, ICON DEVELOPMENT SOLUTIONS,
 AND ALISON BOECKMANN. IMPLEMENTATION, EFFICIENCY, AND STANDARDIZATION
 PERFORMED BY NOUS INFOSYSTEMS.
 PROBLEM NO.:         1
 ORAL1_1CPT_KAVVMKM SINGLE DOSE FOCEI (120 Ind/2279 Obs) runODE029
 TOT. NO. OF OBS RECS:     2279
 TOT. NO. OF INDIVIDUALS:      120
 GENERAL NONLINEAR KINETICS MODEL WITH STIFF/NONSTIFF EQUATIONS (LSODA, ADVAN13)
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 #TBLN:      1
 #METH: First Order Conditional Estimation with Interaction
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
 #TERM:
0MINIMIZATION SUCCESSFUL
 HOWEVER, PROBLEMS OCCURRED WITH THE MINIMIZATION.
 REGARD THE RESULTS OF THE ESTIMATION STEP CAREFULLY, AND ACCEPT THEM ONLY
 AFTER CHECKING THAT THE COVARIANCE STEP PRODUCES REASONABLE OUTPUT.
 NO. OF FUNCTION EVALUATIONS USED:      982
 NO. OF SIG. DIGITS IN FINAL EST.:  2.0

 ETABAR IS THE ARITHMETIC MEAN OF THE ETA-ESTIMATES,
 AND THE P-VALUE IS GIVEN FOR THE NULL HYPOTHESIS THAT THE TRUE MEAN IS 0.

 ETABAR:         1.3686E-03 -8.0722E-03 -4.9293E-03 -9.0567E-03
 SE:             1.9266E-02  1.9708E-02  2.6108E-02  2.4709E-02
 N:                     120         120         120         120

 P VAL.:         9.4337E-01  6.8211E-01  8.5025E-01  7.1397E-01

 ETASHRINKSD(%)  1.9426E+01  3.7489E+01  2.2053E+00  1.0949E+01
 ETASHRINKVR(%)  3.5078E+01  6.0923E+01  4.3619E+00  2.0699E+01
 EBVSHRINKSD(%)  1.8566E+01  3.8255E+01  2.4272E+00  1.1324E+01
 EBVSHRINKVR(%)  3.3684E+01  6.1876E+01  4.7956E+00  2.1366E+01
 EPSSHRINKSD(%)  7.0350E+00
 EPSSHRINKVR(%)  1.3575E+01


 TOTAL DATA POINTS NORMALLY DISTRIBUTED (N):         2279
 N*LOG(2PI) CONSTANT TO OBJECTIVE FUNCTION:    4188.52183434690
 OBJECTIVE FUNCTION VALUE WITHOUT CONSTANT:    19889.7931075110
 OBJECTIVE FUNCTION VALUE WITH CONSTANT:       24078.3149418579
 REPORTED OBJECTIVE FUNCTION DOES NOT CONTAIN CONSTANT

 TOTAL EFFECTIVE ETAS (NIND*NETA):                           480


 #TERE:
 Elapsed estimation  time in seconds:   376.22
 Elapsed covariance  time in seconds:    39.54
 Elapsed postprocess time in seconds:     0.60

 ********************               FIRST ORDER CONDITIONAL ESTIMATION WITH INTERACTION              ********************
 #OBJT:**************                       MINIMUM VALUE OF OBJECTIVE FUNCTION                      ********************
 #OBJV:********************************************    19889.793       **************************************************

 ********************               FIRST ORDER CONDITIONAL ESTIMATION WITH INTERACTION              ********************
 ********************                             FINAL PARAMETER ESTIMATE                           ********************

 THETA - VECTOR OF FIXED EFFECTS PARAMETERS   *********
         TH 1      TH 2      TH 3      TH 4      TH 5
         6.89E+00  5.48E+00  4.24E+00  1.20E-04  1.93E-01

 OMEGA - COV MATRIX FOR RANDOM EFFECTS - ETAS  ********
         ETA1      ETA2      ETA3      ETA4
 ETA1
+        6.92E-02
 ETA2
+        0.00E+00  1.20E-01
 ETA3
+        0.00E+00  0.00E+00  8.62E-02
 ETA4
+        0.00E+00  0.00E+00  0.00E+00  9.32E-02

 SIGMA - COV MATRIX FOR RANDOM EFFECTS - EPSILONS  ****
         EPS1
 EPS1
+        1.00E+00

 OMEGA - CORR MATRIX FOR RANDOM EFFECTS - ETAS  *******
         ETA1      ETA2      ETA3      ETA4
 ETA1
+        2.63E-01
 ETA2
+        0.00E+00  3.47E-01
 ETA3
+        0.00E+00  0.00E+00  2.94E-01
 ETA4
+        0.00E+00  0.00E+00  0.00E+00  3.05E-01

 SIGMA - CORR MATRIX FOR RANDOM EFFECTS - EPSILONS  ***
         EPS1
 EPS1
+        1.00E+00

 ********************               FIRST ORDER CONDITIONAL ESTIMATION WITH INTERACTION              ********************
 ********************                            STANDARD ERROR OF ESTIMATE                          ********************

 THETA - VECTOR OF FIXED EFFECTS PARAMETERS   *********
         TH 1      TH 2      TH 3      TH 4      TH 5
         6.05E-02  1.12E-01  2.84E-02  3.20E-02  3.49E-03

 OMEGA - COV MATRIX FOR RANDOM EFFECTS - ETAS  ********
         ETA1      ETA2      ETA3      ETA4
 ETA1
+        1.74E-02
 ETA2
+       .........  4.82E-02
 ETA3
+       ......... .........  9.22E-03
 ETA4
+       ......... ......... .........  1.27E-02

 SIGMA - COV MATRIX FOR RANDOM EFFECTS - EPSILONS  ****
         EPS1
 EPS1
+       .........

 OMEGA - CORR MATRIX FOR RANDOM EFFECTS - ETAS  *******
         ETA1      ETA2      ETA3      ETA4
 ETA1
+        3.30E-02
 ETA2
+       .........  6.96E-02
 ETA3
+       ......... .........  1.57E-02
 ETA4
+       ......... ......... .........  2.08E-02

 SIGMA - CORR MATRIX FOR RANDOM EFFECTS - EPSILONS  ***
         EPS1
 EPS1
+       .........

 ********************               FIRST ORDER CONDITIONAL ESTIMATION WITH INTERACTION              ********************
 ********************                          COVARIANCE MATRIX OF ESTIMATE                         ********************

            TH 1      TH 2      TH 3      TH 4      TH 5      OM11      OM12      OM13      OM14      OM22      OM23      OM24
             OM33      OM34      OM44      SG11
 TH 1
+        3.67E-03
 TH 2
+        5.91E-03  1.25E-02
 TH 3
+       -3.29E-04 -9.38E-04  8.06E-04
 TH 4
+       -2.75E-04 -7.70E-04  9.33E-05  1.02E-03
 TH 5
+       -1.53E-05 -4.11E-05  5.89E-06  2.13E-05  1.22E-05
 OM11
+       -4.66E-04 -7.45E-04 -1.07E-05 -3.44E-05 -4.84E-06  3.02E-04
 OM12
+       ......... ......... ......... ......... ......... ......... .........
 OM13
+       ......... ......... ......... ......... ......... ......... ......... .........
 OM14
+       ......... ......... ......... ......... ......... ......... ......... ......... .........
 OM22
+        1.28E-03  2.88E-03 -1.28E-04 -8.99E-05 -1.74E-05 -5.05E-04 ......... ......... .........  2.33E-03
 OM23
+       ......... ......... ......... ......... ......... ......... ......... ......... ......... ......... .........
 OM24
+       ......... ......... ......... ......... ......... ......... ......... ......... ......... ......... ......... .........
 OM33
+        5.06E-05  1.71E-04 -2.46E-05 -1.38E-06  1.28E-07 -6.43E-06 ......... ......... .........  5.35E-05 ......... .........
          8.50E-05
 OM34
+       ......... ......... ......... ......... ......... ......... ......... ......... ......... ......... ......... .........
         ......... .........
 OM44
+       -1.58E-05 -9.58E-05  2.85E-05  3.03E-05  5.21E-06  3.36E-06 ......... ......... ......... -7.11E-05 ......... .........
          2.89E-06 .........  1.61E-04
 SG11
+       ......... ......... ......... ......... ......... ......... ......... ......... ......... ......... ......... .........
         ......... ......... ......... .........

 ********************               FIRST ORDER CONDITIONAL ESTIMATION WITH INTERACTION              ********************
 ********************                          CORRELATION MATRIX OF ESTIMATE                        ********************

            TH 1      TH 2      TH 3      TH 4      TH 5      OM11      OM12      OM13      OM14      OM22      OM23      OM24
             OM33      OM34      OM44      SG11
 TH 1
+        6.05E-02
 TH 2
+        8.73E-01  1.12E-01
 TH 3
+       -1.91E-01 -2.95E-01  2.84E-02
 TH 4
+       -1.42E-01 -2.15E-01  1.03E-01  3.20E-02
 TH 5
+       -7.23E-02 -1.05E-01  5.95E-02  1.91E-01  3.49E-03
 OM11
+       -4.43E-01 -3.83E-01 -2.16E-02 -6.19E-02 -7.99E-02  1.74E-02
 OM12
+       ......... ......... ......... ......... ......... ......... .........
 OM13
+       ......... ......... ......... ......... ......... ......... ......... .........
 OM14
+       ......... ......... ......... ......... ......... ......... ......... ......... .........
 OM22
+        4.37E-01  5.33E-01 -9.34E-02 -5.83E-02 -1.03E-01 -6.03E-01 ......... ......... .........  4.82E-02
 OM23
+       ......... ......... ......... ......... ......... ......... ......... ......... ......... ......... .........
 OM24
+       ......... ......... ......... ......... ......... ......... ......... ......... ......... ......... ......... .........
 OM33
+        9.07E-02  1.66E-01 -9.39E-02 -4.67E-03  3.98E-03 -4.02E-02 ......... ......... .........  1.20E-01 ......... .........
          9.22E-03
 OM34
+       ......... ......... ......... ......... ......... ......... ......... ......... ......... ......... ......... .........
         ......... .........
 OM44
+       -2.06E-02 -6.74E-02  7.92E-02  7.47E-02  1.18E-01  1.52E-02 ......... ......... ......... -1.16E-01 ......... .........
          2.47E-02 .........  1.27E-02
 SG11
+       ......... ......... ......... ......... ......... ......... ......... ......... ......... ......... ......... .........
         ......... ......... ......... .........
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 Elapsed finaloutput time in seconds:     0.19
 #CPUT: Total CPU Time in Seconds,      417.125
