Run Start Date:  29/08/2019
Run Start Time: 18:20:14.43
Run Stop Date:   29/08/2019
Run Stop Time:  18:45:55.18

********************                            CONTROL STREAM                                      ********************

$PROB    INFUSION_2CPT_V1QV2VMKM SINGLE DOSE FOCEI (120 Ind/2280 Obs) runODE054
$INPUT   ID TIME DV LNDV MDV AMT RATE EVID DOSE VI VMI KMI QI V2I SD CMT
$DATA    INFUSION_2CPTMM.csv IGNORE=@ IGNORE(SD.EQ.0)
$SUBR    ADVAN13 TOL=7
$MODEL
         COMP=(CENTRAL,DEFOBS,DEFDOSE)
         COMP=(PERI)
$PK
         VM=EXP(THETA(1)+ETA(1))
         KM=EXP(THETA(2)+ETA(2))
         V =EXP(THETA(3)+ETA(3))
         Q =EXP(THETA(4)+ETA(4))
         V2=EXP(THETA(5)+ETA(5))
         K12=Q/V
         K21=Q/V2
         V1=V
         S1=V
$DES
         C1=A(1)/V1
         DADT(1)= K21*A(2)-K12*A(1)-VM*C1/(KM+C1)
         DADT(2)=-K21*A(2)+K12*A(1)
$ERROR
         IPRED = F
         RESCV = THETA(6)
         W     = IPRED*RESCV
         IRES  = DV-IPRED
         IWRES = IRES/W
         Y     = IPRED+W*EPS(1)

$THETA   7         ;log VM
$THETA   5.7       ;log KM
$THETA   4.5       ;log Vc
$THETA   1.5       ;log Q
$THETA   4         ;log Vp
$THETA   (0,0.3,1) ;RSV
$OMEGA   0.15 0.15 0.15 0.15 0.15
$SIGMA   1 FIX
$EST     NSIG=2 SIGL=6 PRINT=5 MAX=9999 NOABORT POSTHOC METHOD=COND INTER NOOBT
$COV
$TABLE  ID TIME LNDV MDV AMT EVID DOSE VI VMI KMI V VM KM Q V2 ETA1 ETA2 ETA3 ETA4 ETA5
        IPRED IRES IWRES CWRESI
        ONEHEADER NOPRINT FILE=runODE054.csv

********************                            SYSTEM INFORMATION                                  ********************

Operating system:

Microsoft Windows [Version 10.0.18362.295]

Compiler: Intel(R) Parallel Studio XE 2015 Update 3 Composer Edition (package 208)

Compiler settings: /Gs /nologo /nbs /w /fp:strict

********************                            NMTRAN MESSAGES                                     ********************

 WARNINGS AND ERRORS (IF ANY) FOR PROBLEM    1
 (WARNING  2) NM-TRAN INFERS THAT THE DATA ARE POPULATION.
********************                            NONMEM EXECUTION                                    ********************

1NONLINEAR MIXED EFFECTS MODEL PROGRAM (NONMEM) VERSION 7.4.3
 ORIGINALLY DEVELOPED BY STUART BEAL, LEWIS SHEINER, AND ALISON BOECKMANN
 CURRENT DEVELOPERS ARE ROBERT BAUER, ICON DEVELOPMENT SOLUTIONS,
 AND ALISON BOECKMANN. IMPLEMENTATION, EFFICIENCY, AND STANDARDIZATION
 PERFORMED BY NOUS INFOSYSTEMS.
 PROBLEM NO.:         1
 INFUSION_2CPT_V1QV2VMKM SINGLE DOSE FOCEI (120 Ind/2280 Obs) runODE054
 TOT. NO. OF OBS RECS:     2280
 TOT. NO. OF INDIVIDUALS:      120
 GENERAL NONLINEAR KINETICS MODEL WITH STIFF/NONSTIFF EQUATIONS (LSODA, ADVAN13)
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 #TBLN:      1
 #METH: First Order Conditional Estimation with Interaction
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
 #TERM:
0MINIMIZATION SUCCESSFUL
 HOWEVER, PROBLEMS OCCURRED WITH THE MINIMIZATION.
 REGARD THE RESULTS OF THE ESTIMATION STEP CAREFULLY, AND ACCEPT THEM ONLY
 AFTER CHECKING THAT THE COVARIANCE STEP PRODUCES REASONABLE OUTPUT.
 NO. OF FUNCTION EVALUATIONS USED:     3323
 NO. OF SIG. DIGITS IN FINAL EST.:  2.2

 ETABAR IS THE ARITHMETIC MEAN OF THE ETA-ESTIMATES,
 AND THE P-VALUE IS GIVEN FOR THE NULL HYPOTHESIS THAT THE TRUE MEAN IS 0.

 ETABAR:         7.6258E-03 -8.5230E-03 -5.4262E-03  1.4606E-02 -1.2902E-02
 SE:             2.0952E-02  1.6842E-02  2.6512E-02  1.2157E-02  2.1188E-02
 N:                     120         120         120         120         120

 P VAL.:         7.1589E-01  6.1281E-01  8.3783E-01  2.2956E-01  5.4256E-01

 ETASHRINKSD(%)  2.3377E+01  4.4857E+01  2.0356E+00  5.2269E+01  3.0241E+01
 ETASHRINKVR(%)  4.1290E+01  6.9593E+01  4.0298E+00  7.7218E+01  5.1337E+01
 EBVSHRINKSD(%)  2.2547E+01  4.5204E+01  2.6250E+00  5.2207E+01  3.0064E+01
 EBVSHRINKVR(%)  4.0011E+01  6.9974E+01  5.1812E+00  7.7159E+01  5.1089E+01
 EPSSHRINKSD(%)  6.4409E+00
 EPSSHRINKVR(%)  1.2467E+01


 TOTAL DATA POINTS NORMALLY DISTRIBUTED (N):         2280
 N*LOG(2PI) CONSTANT TO OBJECTIVE FUNCTION:    4190.35971141331
 OBJECTIVE FUNCTION VALUE WITHOUT CONSTANT:    21038.2055435159
 OBJECTIVE FUNCTION VALUE WITH CONSTANT:       25228.5652549292
 REPORTED OBJECTIVE FUNCTION DOES NOT CONTAIN CONSTANT

 TOTAL EFFECTIVE ETAS (NIND*NETA):                           600


 #TERE:
 Elapsed estimation  time in seconds:  1468.80
 Elapsed covariance  time in seconds:    62.05
 Elapsed postprocess time in seconds:     0.66

 ********************               FIRST ORDER CONDITIONAL ESTIMATION WITH INTERACTION              ********************
 #OBJT:**************                       MINIMUM VALUE OF OBJECTIVE FUNCTION                      ********************
 #OBJV:********************************************    21038.206       **************************************************

 ********************               FIRST ORDER CONDITIONAL ESTIMATION WITH INTERACTION              ********************
 ********************                             FINAL PARAMETER ESTIMATE                           ********************

 THETA - VECTOR OF FIXED EFFECTS PARAMETERS   *********
         TH 1      TH 2      TH 3      TH 4      TH 5      TH 6
         7.15E+00  5.82E+00  4.26E+00  1.35E+00  3.84E+00  2.00E-01

 OMEGA - COV MATRIX FOR RANDOM EFFECTS - ETAS  ********
         ETA1      ETA2      ETA3      ETA4      ETA5
 ETA1
+        9.05E-02
 ETA2
+        0.00E+00  1.13E-01
 ETA3
+        0.00E+00  0.00E+00  8.86E-02
 ETA4
+        0.00E+00  0.00E+00  0.00E+00  7.85E-02
 ETA5
+        0.00E+00  0.00E+00  0.00E+00  0.00E+00  1.12E-01

 SIGMA - COV MATRIX FOR RANDOM EFFECTS - EPSILONS  ****
         EPS1
 EPS1
+        1.00E+00

 OMEGA - CORR MATRIX FOR RANDOM EFFECTS - ETAS  *******
         ETA1      ETA2      ETA3      ETA4      ETA5
 ETA1
+        3.01E-01
 ETA2
+        0.00E+00  3.36E-01
 ETA3
+        0.00E+00  0.00E+00  2.98E-01
 ETA4
+        0.00E+00  0.00E+00  0.00E+00  2.80E-01
 ETA5
+        0.00E+00  0.00E+00  0.00E+00  0.00E+00  3.34E-01

 SIGMA - CORR MATRIX FOR RANDOM EFFECTS - EPSILONS  ***
         EPS1
 EPS1
+        1.00E+00

 ********************               FIRST ORDER CONDITIONAL ESTIMATION WITH INTERACTION              ********************
 ********************                            STANDARD ERROR OF ESTIMATE                          ********************

 THETA - VECTOR OF FIXED EFFECTS PARAMETERS   *********
         TH 1      TH 2      TH 3      TH 4      TH 5      TH 6
         1.57E-01  2.41E-01  2.79E-02  6.71E-02  7.07E-02  3.66E-03

 OMEGA - COV MATRIX FOR RANDOM EFFECTS - ETAS  ********
         ETA1      ETA2      ETA3      ETA4      ETA5
 ETA1
+        2.84E-02
 ETA2
+       .........  5.93E-02
 ETA3
+       ......... .........  1.20E-02
 ETA4
+       ......... ......... .........  3.74E-02
 ETA5
+       ......... ......... ......... .........  3.28E-02

 SIGMA - COV MATRIX FOR RANDOM EFFECTS - EPSILONS  ****
         EPS1
 EPS1
+       .........

 OMEGA - CORR MATRIX FOR RANDOM EFFECTS - ETAS  *******
         ETA1      ETA2      ETA3      ETA4      ETA5
 ETA1
+        4.71E-02
 ETA2
+       .........  8.82E-02
 ETA3
+       ......... .........  2.02E-02
 ETA4
+       ......... ......... .........  6.68E-02
 ETA5
+       ......... ......... ......... .........  4.91E-02

 SIGMA - CORR MATRIX FOR RANDOM EFFECTS - EPSILONS  ***
         EPS1
 EPS1
+       .........
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 Elapsed finaloutput time in seconds:     0.20
 #CPUT: Total CPU Time in Seconds,     1532.172
