Run Start Date:  29/08/2019
Run Start Time: 19:44:27.39
Run Stop Date:   29/08/2019
Run Stop Time:  20:04:21.88

********************                            CONTROL STREAM                                      ********************

$PROB    ORAL1_2CPT_KACLV1QV2 MULTIPLE DOSE FOCEI (120 Ind/4680 Obs) runODE061
$INPUT   ID TIME DV LNDV MDV AMT EVID DOSE V1I CLI QI V2I KAI SSX IIX SD CMT
$DATA    ORAL_2CPT.csv IGNORE=@ IGNORE (SD.EQ.1)
$SUBR    ADVAN13 TOL=6
$MODEL
         COMP=(ABS,DEFDOSE)
         COMP=(CENTRAL,DEFOBS)
         COMP=(PERI)
$PK
         CL=EXP(THETA(1)+ETA(1))
         V=EXP(THETA(2)+ETA(2))
         Q=EXP(THETA(3)+ETA(3))
         V3=EXP(THETA(4)+ETA(4))
		 KA=EXP(THETA(5)+ETA(5))
         V2=V
         S2=V
		 K32=Q/V3
		 K23=Q/V
$DES
         DADT(1)= -KA*A(1)
         DADT(2)=  KA*A(1)+K32*A(3)-K23*A(2)-CL*A(2)/V2
         DADT(3)=         -K32*A(3)+K23*A(2)
$ERROR
         IPRED = F
         RESCV = THETA(6)
         W     = IPRED*RESCV
         IRES  = DV-IPRED
         IWRES = IRES/W
         Y     = IPRED+W*EPS(1)
$THETA   1.6       ;log Cl
$THETA   4.5       ;log Vc
$THETA   1.6       ;log Q
$THETA   4         ;log Vp
$THETA   0.2       ;log KA
$THETA   (0,0.3,1) ;RSV
$OMEGA   0.15 0.15 0.15 0.15 0.15
$SIGMA   1 FIX
$EST     NSIG=2 SIGL=6 PRINT=5 MAX=9999 NOABORT POSTHOC METHOD=COND INTER NOOBT
$COV
$TABLE  ID TIME LNDV MDV AMT EVID DOSE V1I CLI CL V Q V3 KA ETA1 ETA2 ETA3 ETA4 ETA5
        IPRED IRES IWRES CWRESI
        ONEHEADER NOPRINT FILE=runODE061.csv

********************                            SYSTEM INFORMATION                                  ********************

Operating system:

Microsoft Windows [Version 10.0.18362.295]

Compiler: Intel(R) Parallel Studio XE 2015 Update 3 Composer Edition (package 208)

Compiler settings: /Gs /nologo /nbs /w /fp:strict

********************                            NMTRAN MESSAGES                                     ********************

 WARNINGS AND ERRORS (IF ANY) FOR PROBLEM    1
 (WARNING  2) NM-TRAN INFERS THAT THE DATA ARE POPULATION.
********************                            NONMEM EXECUTION                                    ********************

1NONLINEAR MIXED EFFECTS MODEL PROGRAM (NONMEM) VERSION 7.4.3
 ORIGINALLY DEVELOPED BY STUART BEAL, LEWIS SHEINER, AND ALISON BOECKMANN
 CURRENT DEVELOPERS ARE ROBERT BAUER, ICON DEVELOPMENT SOLUTIONS,
 AND ALISON BOECKMANN. IMPLEMENTATION, EFFICIENCY, AND STANDARDIZATION
 PERFORMED BY NOUS INFOSYSTEMS.
 PROBLEM NO.:         1
 ORAL1_2CPT_KACLV1QV2 MULTIPLE DOSE FOCEI (120 Ind/4680 Obs) runODE061
 TOT. NO. OF OBS RECS:     4680
 TOT. NO. OF INDIVIDUALS:      120
 GENERAL NONLINEAR KINETICS MODEL WITH STIFF/NONSTIFF EQUATIONS (LSODA, ADVAN13)
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 #TBLN:      1
 #METH: First Order Conditional Estimation with Interaction
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
 #TERM:
0MINIMIZATION SUCCESSFUL
 HOWEVER, PROBLEMS OCCURRED WITH THE MINIMIZATION.
 REGARD THE RESULTS OF THE ESTIMATION STEP CAREFULLY, AND ACCEPT THEM ONLY
 AFTER CHECKING THAT THE COVARIANCE STEP PRODUCES REASONABLE OUTPUT.
 NO. OF FUNCTION EVALUATIONS USED:      545
 NO. OF SIG. DIGITS IN FINAL EST.:  2.5

 ETABAR IS THE ARITHMETIC MEAN OF THE ETA-ESTIMATES,
 AND THE P-VALUE IS GIVEN FOR THE NULL HYPOTHESIS THAT THE TRUE MEAN IS 0.

 ETABAR:         2.5860E-04 -1.6685E-02  7.8292E-03  1.3249E-02 -1.3938E-02
 SE:             2.8797E-02  2.0018E-02  2.2943E-02  1.8440E-02  2.4653E-02
 N:                     120         120         120         120         120

 P VAL.:         9.9284E-01  4.0455E-01  7.3292E-01  4.7244E-01  5.7182E-01

 ETASHRINKSD(%)  3.9122E-01  1.2083E+01  4.4859E+01  2.5843E+01  2.1811E+01
 ETASHRINKVR(%)  7.8090E-01  2.2706E+01  6.9594E+01  4.5008E+01  3.8865E+01
 EBVSHRINKSD(%)  6.2590E-01  1.2431E+01  4.2971E+01  2.6418E+01  2.1892E+01
 EBVSHRINKVR(%)  1.2479E+00  2.3316E+01  6.7477E+01  4.5858E+01  3.8992E+01
 EPSSHRINKSD(%)  3.8853E+00
 EPSSHRINKVR(%)  7.6196E+00


 TOTAL DATA POINTS NORMALLY DISTRIBUTED (N):         4680
 N*LOG(2PI) CONSTANT TO OBJECTIVE FUNCTION:    8601.26467079574
 OBJECTIVE FUNCTION VALUE WITHOUT CONSTANT:    45413.6072197901
 OBJECTIVE FUNCTION VALUE WITH CONSTANT:       54014.8718905858
 REPORTED OBJECTIVE FUNCTION DOES NOT CONTAIN CONSTANT

 TOTAL EFFECTIVE ETAS (NIND*NETA):                           600


 #TERE:
 Elapsed estimation  time in seconds:   904.52
 Elapsed covariance  time in seconds:   275.66
 Elapsed postprocess time in seconds:     2.91

 ********************               FIRST ORDER CONDITIONAL ESTIMATION WITH INTERACTION              ********************
 #OBJT:**************                       MINIMUM VALUE OF OBJECTIVE FUNCTION                      ********************
 #OBJV:********************************************    45413.607       **************************************************

 ********************               FIRST ORDER CONDITIONAL ESTIMATION WITH INTERACTION              ********************
 ********************                             FINAL PARAMETER ESTIMATE                           ********************

 THETA - VECTOR OF FIXED EFFECTS PARAMETERS   *********
         TH 1      TH 2      TH 3      TH 4      TH 5      TH 6
         1.34E+00  4.24E+00  1.46E+00  3.77E+00 -8.16E-02  1.98E-01

 OMEGA - COV MATRIX FOR RANDOM EFFECTS - ETAS  ********
         ETA1      ETA2      ETA3      ETA4      ETA5
 ETA1
+        1.01E-01
 ETA2
+        0.00E+00  6.27E-02
 ETA3
+        0.00E+00  0.00E+00  2.09E-01
 ETA4
+        0.00E+00  0.00E+00  0.00E+00  7.48E-02
 ETA5
+        0.00E+00  0.00E+00  0.00E+00  0.00E+00  1.20E-01

 SIGMA - COV MATRIX FOR RANDOM EFFECTS - EPSILONS  ****
         EPS1
 EPS1
+        1.00E+00

 OMEGA - CORR MATRIX FOR RANDOM EFFECTS - ETAS  *******
         ETA1      ETA2      ETA3      ETA4      ETA5
 ETA1
+        3.18E-01
 ETA2
+        0.00E+00  2.50E-01
 ETA3
+        0.00E+00  0.00E+00  4.58E-01
 ETA4
+        0.00E+00  0.00E+00  0.00E+00  2.74E-01
 ETA5
+        0.00E+00  0.00E+00  0.00E+00  0.00E+00  3.47E-01

 SIGMA - CORR MATRIX FOR RANDOM EFFECTS - EPSILONS  ***
         EPS1
 EPS1
+        1.00E+00

 ********************               FIRST ORDER CONDITIONAL ESTIMATION WITH INTERACTION              ********************
 ********************                            STANDARD ERROR OF ESTIMATE                          ********************

 THETA - VECTOR OF FIXED EFFECTS PARAMETERS   *********
         TH 1      TH 2      TH 3      TH 4      TH 5      TH 6
         2.98E-02  4.01E-02  1.74E-01  6.38E-02  6.29E-02  2.02E-03

 OMEGA - COV MATRIX FOR RANDOM EFFECTS - ETAS  ********
         ETA1      ETA2      ETA3      ETA4      ETA5
 ETA1
+        1.70E-02
 ETA2
+       .........  9.69E-03
 ETA3
+       ......... .........  7.95E-02
 ETA4
+       ......... ......... .........  1.91E-02
 ETA5
+       ......... ......... ......... .........  2.36E-02

 SIGMA - COV MATRIX FOR RANDOM EFFECTS - EPSILONS  ****
         EPS1
 EPS1
+       .........

 OMEGA - CORR MATRIX FOR RANDOM EFFECTS - ETAS  *******
         ETA1      ETA2      ETA3      ETA4      ETA5
 ETA1
+        2.67E-02
 ETA2
+       .........  1.93E-02
 ETA3
+       ......... .........  8.69E-02
 ETA4
+       ......... ......... .........  3.50E-02
 ETA5
+       ......... ......... ......... .........  3.40E-02

 SIGMA - CORR MATRIX FOR RANDOM EFFECTS - EPSILONS  ***
         EPS1
 EPS1
+       .........
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 Elapsed finaloutput time in seconds:     0.40
 #CPUT: Total CPU Time in Seconds,     1185.609
