Thu Jun 19 00:51:58 CEST 2025
$PROB    ORAL1_1CPT_KAVCL MULTIPLE DOSE FOCEI (120 Ind/4674 Obs) runN024
$INPUT   ID TIME DV LNDV MDV AMT EVID DOSE VI CLI KAI SSX IIX SD CMT
$DATA    ORAL_1CPT.csv IGNORE=@ IGNORE (SD.EQ.1)
$SUBR    ADVAN2,TRANS2
$PK
         CL=EXP(THETA(1)+ETA(1))
         V=EXP(THETA(2)+ETA(2))
         KA=EXP(THETA(3)+ETA(3))
         S2=V
$ERROR
         IPRED = F
         RESCV = THETA(4)
         W     = IPRED*RESCV
         IRES  = DV-IPRED
         IWRES = IRES/W
         Y     = IPRED+W*EPS(1)
$THETA   1.6       ;log Cl
$THETA   4.5       ;log Vc
$THETA   0.2       ;log KA
$THETA   (0,0.3,1) ;RSV
$OMEGA   0.15 0.15 0.15
$SIGMA   1 FIX
$EST     NSIG=3 PRINT=5 MAX=9999 NOABORT POSTHOC METHOD=COND INTER NOOBT
$COV
$TABLE  ID TIME LNDV MDV AMT EVID DOSE VI CLI CL V KA ETA1 ETA2 ETA3
        IPRED IRES IWRES CWRESI
        ONEHEADER NOPRINT FILE=runN024.csv

NM-TRAN MESSAGES
 WARNINGS AND ERRORS (IF ANY) FOR PROBLEM    1
 (WARNING  2) NM-TRAN INFERS THAT THE DATA ARE POPULATION.

1NONLINEAR MIXED EFFECTS MODEL PROGRAM (NONMEM) VERSION 7.4.3
 ORIGINALLY DEVELOPED BY STUART BEAL, LEWIS SHEINER, AND ALISON BOECKMANN
 CURRENT DEVELOPERS ARE ROBERT BAUER, ICON DEVELOPMENT SOLUTIONS,
 AND ALISON BOECKMANN. IMPLEMENTATION, EFFICIENCY, AND STANDARDIZATION
 PERFORMED BY NOUS INFOSYSTEMS.
 PROBLEM NO.:         1
 ORAL1_1CPT_KAVCL MULTIPLE DOSE FOCEI (120 Ind/4674 Obs) runN024
 TOT. NO. OF OBS RECS:     4674
 TOT. NO. OF INDIVIDUALS:      120
 ONE COMPARTMENT MODEL WITH FIRST-ORDER ABSORPTION (ADVAN2)
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 #TBLN:      1
 #METH: First Order Conditional Estimation with Interaction
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
 #TERM:
0MINIMIZATION SUCCESSFUL
 HOWEVER, PROBLEMS OCCURRED WITH THE MINIMIZATION.
 REGARD THE RESULTS OF THE ESTIMATION STEP CAREFULLY, AND ACCEPT THEM ONLY
 AFTER CHECKING THAT THE COVARIANCE STEP PRODUCES REASONABLE OUTPUT.
 NO. OF FUNCTION EVALUATIONS USED:      458
 NO. OF SIG. DIGITS IN FINAL EST.:  3.0

 ETABAR IS THE ARITHMETIC MEAN OF THE ETA-ESTIMATES,
 AND THE P-VALUE IS GIVEN FOR THE NULL HYPOTHESIS THAT THE TRUE MEAN IS 0.

 ETABAR:        -8.9213E-04 -3.3233E-03 -5.4479E-03
 SE:             2.4045E-02  2.5081E-02  2.8498E-02
 N:                     120         120         120

 P VAL.:         9.7040E-01  8.9458E-01  8.4839E-01

 ETASHRINKSD(%)  4.9996E-01  2.2355E+00  1.3060E+01
 ETASHRINKVR(%)  9.9743E-01  4.4210E+00  2.4414E+01
 EBVSHRINKSD(%)  8.7483E-01  2.3945E+00  1.3203E+01
 EBVSHRINKVR(%)  1.7420E+00  4.7317E+00  2.4662E+01
 EPSSHRINKSD(%)  3.2405E+00
 EPSSHRINKVR(%)  6.3759E+00


 TOTAL DATA POINTS NORMALLY DISTRIBUTED (N):         4674
 N*LOG(2PI) CONSTANT TO OBJECTIVE FUNCTION:    8590.23740839728
 OBJECTIVE FUNCTION VALUE WITHOUT CONSTANT:    43707.1166855974
 OBJECTIVE FUNCTION VALUE WITH CONSTANT:       52297.3540939947
 REPORTED OBJECTIVE FUNCTION DOES NOT CONTAIN CONSTANT

 TOTAL EFFECTIVE ETAS (NIND*NETA):                           360


 #TERE:
 Elapsed estimation  time in seconds:    28.63
 Elapsed covariance  time in seconds:     4.82
 Elapsed postprocess time in seconds:     0.15

 ********************               FIRST ORDER CONDITIONAL ESTIMATION WITH INTERACTION              ********************
 #OBJT:**************                       MINIMUM VALUE OF OBJECTIVE FUNCTION                      ********************
 #OBJV:********************************************    43707.117       **************************************************

 ********************               FIRST ORDER CONDITIONAL ESTIMATION WITH INTERACTION              ********************
 ********************                             FINAL PARAMETER ESTIMATE                           ********************

 THETA - VECTOR OF FIXED EFFECTS PARAMETERS   *********
         TH 1      TH 2      TH 3      TH 4
         1.39E+00  4.21E+00 -8.32E-03  1.97E-01

 OMEGA - COV MATRIX FOR RANDOM EFFECTS - ETAS  ********
         ETA1      ETA2      ETA3
 ETA1
+        7.07E-02
 ETA2
+        0.00E+00  7.96E-02
 ETA3
+        0.00E+00  0.00E+00  1.30E-01

 SIGMA - COV MATRIX FOR RANDOM EFFECTS - EPSILONS  ****
         EPS1
 EPS1
+        1.00E+00

 OMEGA - CORR MATRIX FOR RANDOM EFFECTS - ETAS  *******
         ETA1      ETA2      ETA3
 ETA1
+        2.66E-01
 ETA2
+        0.00E+00  2.82E-01
 ETA3
+        0.00E+00  0.00E+00  3.61E-01

 SIGMA - CORR MATRIX FOR RANDOM EFFECTS - EPSILONS  ***
         EPS1
 EPS1
+        1.00E+00

 ********************               FIRST ORDER CONDITIONAL ESTIMATION WITH INTERACTION              ********************
 ********************                            STANDARD ERROR OF ESTIMATE                          ********************

 THETA - VECTOR OF FIXED EFFECTS PARAMETERS   *********
         TH 1      TH 2      TH 3      TH 4
         2.44E-02  2.65E-02  3.82E-02  1.86E-03

 OMEGA - COV MATRIX FOR RANDOM EFFECTS - ETAS  ********
         ETA1      ETA2      ETA3
 ETA1
+        7.38E-03
 ETA2
+       .........  1.04E-02
 ETA3
+       ......... .........  2.14E-02

 SIGMA - COV MATRIX FOR RANDOM EFFECTS - EPSILONS  ****
         EPS1
 EPS1
+       .........

 OMEGA - CORR MATRIX FOR RANDOM EFFECTS - ETAS  *******
         ETA1      ETA2      ETA3
 ETA1
+        1.39E-02
 ETA2
+       .........  1.84E-02
 ETA3
+       ......... .........  2.97E-02

 SIGMA - CORR MATRIX FOR RANDOM EFFECTS - EPSILONS  ***
         EPS1
 EPS1
+       .........

 ********************               FIRST ORDER CONDITIONAL ESTIMATION WITH INTERACTION              ********************
 ********************                          COVARIANCE MATRIX OF ESTIMATE                         ********************

            TH 1      TH 2      TH 3      TH 4      OM11      OM12      OM13      OM22      OM23      OM33      SG11
 TH 1
+        5.94E-04
 TH 2
+        1.88E-05  7.01E-04
 TH 3
+        1.32E-06  3.52E-05  1.46E-03
 TH 4
+       -5.89E-06 -1.45E-06  5.38E-06  3.46E-06
 OM11
+       -1.15E-05 -2.61E-05  1.79E-05 -2.00E-06  5.44E-05
 OM12
+       ......... ......... ......... ......... ......... .........
 OM13
+       ......... ......... ......... ......... ......... ......... .........
 OM22
+        2.55E-05  4.74E-05 -2.02E-05  1.78E-06 -7.66E-06 ......... .........  1.08E-04
 OM23
+       ......... ......... ......... ......... ......... ......... ......... ......... .........
 OM33
+       -2.18E-05 -5.97E-05  1.82E-04  1.33E-06  1.24E-05 ......... ......... -5.98E-06 .........  4.58E-04
 SG11
+       ......... ......... ......... ......... ......... ......... ......... ......... ......... ......... .........

 ********************               FIRST ORDER CONDITIONAL ESTIMATION WITH INTERACTION              ********************
 ********************                          CORRELATION MATRIX OF ESTIMATE                        ********************

            TH 1      TH 2      TH 3      TH 4      OM11      OM12      OM13      OM22      OM23      OM33      SG11
 TH 1
+        2.44E-02
 TH 2
+        2.92E-02  2.65E-02
 TH 3
+        1.42E-03  3.48E-02  3.82E-02
 TH 4
+       -1.30E-01 -2.94E-02  7.58E-02  1.86E-03
 OM11
+       -6.37E-02 -1.34E-01  6.37E-02 -1.46E-01  7.38E-03
 OM12
+       ......... ......... ......... ......... ......... .........
 OM13
+       ......... ......... ......... ......... ......... ......... .........
 OM22
+        1.01E-01  1.72E-01 -5.10E-02  9.24E-02 -1.00E-01 ......... .........  1.04E-02
 OM23
+       ......... ......... ......... ......... ......... ......... ......... ......... .........
 OM33
+       -4.18E-02 -1.05E-01  2.23E-01  3.34E-02  7.87E-02 ......... ......... -2.69E-02 .........  2.14E-02
 SG11
+       ......... ......... ......... ......... ......... ......... ......... ......... ......... ......... .........
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 Elapsed finaloutput time in seconds:     0.35
 #CPUT: Total CPU Time in Seconds,       33.917
