Thu Jun 19 00:58:17 CEST 2025
$PROB    ORAL1_2CPT_KACLV1QV2 MULTIPLE DOSE FOCEI (120 Ind/4680 Obs) runN061
$INPUT   ID TIME DV LNDV MDV AMT EVID DOSE V1I CLI QI V2I KAI SSX IIX SD CMT
$DATA    ORAL_2CPT.csv IGNORE=@ IGNORE (SD.EQ.1)
$SUBR    ADVAN4,TRANS4
$PK
         CL=EXP(THETA(1)+ETA(1))
         V=EXP(THETA(2)+ETA(2))
         Q=EXP(THETA(3)+ETA(3))
         V3=EXP(THETA(4)+ETA(4))
         KA=EXP(THETA(5)+ETA(5))
         V2=V
         S2=V
$ERROR
         IPRED = F
         RESCV = THETA(6)
         W     = IPRED*RESCV
         IRES  = DV-IPRED
         IWRES = IRES/W
         Y     = IPRED+W*EPS(1)
$THETA   1.6       ;log Cl
$THETA   4.5       ;log Vc
$THETA   1.6       ;log Q
$THETA   4         ;log Vp
$THETA   0.2       ;log KA
$THETA   (0,0.3,1) ;RSV
$OMEGA   0.15 0.15 0.15 0.15 0.15
$SIGMA   1 FIX
$EST     NSIG=3 PRINT=5 MAX=9999 NOABORT POSTHOC METHOD=COND INTER NOOBT
$COV
$TABLE  ID TIME LNDV MDV AMT EVID DOSE V1I CLI CL V Q V3 KA ETA1 ETA2 ETA3 ETA4 ETA5
        IPRED IRES IWRES CWRESI
        ONEHEADER NOPRINT FILE=runN061.csv

NM-TRAN MESSAGES
 WARNINGS AND ERRORS (IF ANY) FOR PROBLEM    1
 (WARNING  2) NM-TRAN INFERS THAT THE DATA ARE POPULATION.

1NONLINEAR MIXED EFFECTS MODEL PROGRAM (NONMEM) VERSION 7.4.3
 ORIGINALLY DEVELOPED BY STUART BEAL, LEWIS SHEINER, AND ALISON BOECKMANN
 CURRENT DEVELOPERS ARE ROBERT BAUER, ICON DEVELOPMENT SOLUTIONS,
 AND ALISON BOECKMANN. IMPLEMENTATION, EFFICIENCY, AND STANDARDIZATION
 PERFORMED BY NOUS INFOSYSTEMS.
 PROBLEM NO.:         1
 ORAL1_2CPT_KACLV1QV2 MULTIPLE DOSE FOCEI (120 Ind/4680 Obs) runN061
 TOT. NO. OF OBS RECS:     4680
 TOT. NO. OF INDIVIDUALS:      120
 TWO COMPARTMENT MODEL WITH FIRST-ORDER ABSORPTION (ADVAN4)
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 #TBLN:      1
 #METH: First Order Conditional Estimation with Interaction
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
 #TERM:
0MINIMIZATION SUCCESSFUL
 NO. OF FUNCTION EVALUATIONS USED:      350
 NO. OF SIG. DIGITS IN FINAL EST.:  3.9

 ETABAR IS THE ARITHMETIC MEAN OF THE ETA-ESTIMATES,
 AND THE P-VALUE IS GIVEN FOR THE NULL HYPOTHESIS THAT THE TRUE MEAN IS 0.

 ETABAR:         5.7572E-04 -1.6717E-02  7.4812E-03  1.2671E-02 -1.3530E-02
 SE:             2.8799E-02  2.0012E-02  2.3194E-02  1.8323E-02  2.4661E-02
 N:                     120         120         120         120         120

 P VAL.:         9.8405E-01  4.0353E-01  7.4704E-01  4.8924E-01  5.8326E-01

 ETASHRINKSD(%)  3.8153E-01  1.2184E+01  4.4533E+01  2.5951E+01  2.1828E+01
 ETASHRINKVR(%)  7.6160E-01  2.2883E+01  6.9234E+01  4.5168E+01  3.8891E+01
 EBVSHRINKSD(%)  6.2610E-01  1.2487E+01  4.2606E+01  2.6536E+01  2.1897E+01
 EBVSHRINKVR(%)  1.2483E+00  2.3415E+01  6.7059E+01  4.6030E+01  3.9000E+01
 EPSSHRINKSD(%)  3.8891E+00
 EPSSHRINKVR(%)  7.6270E+00


 TOTAL DATA POINTS NORMALLY DISTRIBUTED (N):         4680
 N*LOG(2PI) CONSTANT TO OBJECTIVE FUNCTION:    8601.26467079574
 OBJECTIVE FUNCTION VALUE WITHOUT CONSTANT:    45413.6018561478
 OBJECTIVE FUNCTION VALUE WITH CONSTANT:       54014.8665269436
 REPORTED OBJECTIVE FUNCTION DOES NOT CONTAIN CONSTANT

 TOTAL EFFECTIVE ETAS (NIND*NETA):                           600


 #TERE:
 Elapsed estimation  time in seconds:    33.88
 Elapsed covariance  time in seconds:    18.59
 Elapsed postprocess time in seconds:     0.26

 ********************               FIRST ORDER CONDITIONAL ESTIMATION WITH INTERACTION              ********************
 #OBJT:**************                       MINIMUM VALUE OF OBJECTIVE FUNCTION                      ********************
 #OBJV:********************************************    45413.602       **************************************************

 ********************               FIRST ORDER CONDITIONAL ESTIMATION WITH INTERACTION              ********************
 ********************                             FINAL PARAMETER ESTIMATE                           ********************

 THETA - VECTOR OF FIXED EFFECTS PARAMETERS   *********
         TH 1      TH 2      TH 3      TH 4      TH 5      TH 6
         1.34E+00  4.23E+00  1.47E+00  3.77E+00 -8.52E-02  1.98E-01

 OMEGA - COV MATRIX FOR RANDOM EFFECTS - ETAS  ********
         ETA1      ETA2      ETA3      ETA4      ETA5
 ETA1
+        1.01E-01
 ETA2
+        0.00E+00  6.28E-02
 ETA3
+        0.00E+00  0.00E+00  2.12E-01
 ETA4
+        0.00E+00  0.00E+00  0.00E+00  7.41E-02
 ETA5
+        0.00E+00  0.00E+00  0.00E+00  0.00E+00  1.20E-01

 SIGMA - COV MATRIX FOR RANDOM EFFECTS - EPSILONS  ****
         EPS1
 EPS1
+        1.00E+00

 OMEGA - CORR MATRIX FOR RANDOM EFFECTS - ETAS  *******
         ETA1      ETA2      ETA3      ETA4      ETA5
 ETA1
+        3.18E-01
 ETA2
+        0.00E+00  2.51E-01
 ETA3
+        0.00E+00  0.00E+00  4.60E-01
 ETA4
+        0.00E+00  0.00E+00  0.00E+00  2.72E-01
 ETA5
+        0.00E+00  0.00E+00  0.00E+00  0.00E+00  3.47E-01

 SIGMA - CORR MATRIX FOR RANDOM EFFECTS - EPSILONS  ***
         EPS1
 EPS1
+        1.00E+00

 ********************               FIRST ORDER CONDITIONAL ESTIMATION WITH INTERACTION              ********************
 ********************                            STANDARD ERROR OF ESTIMATE                          ********************

 THETA - VECTOR OF FIXED EFFECTS PARAMETERS   *********
         TH 1      TH 2      TH 3      TH 4      TH 5      TH 6
         2.97E-02  4.01E-02  1.73E-01  6.36E-02  6.32E-02  2.02E-03

 OMEGA - COV MATRIX FOR RANDOM EFFECTS - ETAS  ********
         ETA1      ETA2      ETA3      ETA4      ETA5
 ETA1
+        1.70E-02
 ETA2
+       .........  9.72E-03
 ETA3
+       ......... .........  7.91E-02
 ETA4
+       ......... ......... .........  1.90E-02
 ETA5
+       ......... ......... ......... .........  2.37E-02

 SIGMA - COV MATRIX FOR RANDOM EFFECTS - EPSILONS  ****
         EPS1
 EPS1
+       .........

 OMEGA - CORR MATRIX FOR RANDOM EFFECTS - ETAS  *******
         ETA1      ETA2      ETA3      ETA4      ETA5
 ETA1
+        2.67E-02
 ETA2
+       .........  1.94E-02
 ETA3
+       ......... .........  8.60E-02
 ETA4
+       ......... ......... .........  3.49E-02
 ETA5
+       ......... ......... ......... .........  3.42E-02

 SIGMA - CORR MATRIX FOR RANDOM EFFECTS - EPSILONS  ***
         EPS1
 EPS1
+       .........
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 Elapsed finaloutput time in seconds:     0.31
 #CPUT: Total CPU Time in Seconds,       53.058
